// COMSOL Multiphysics 6.3.0.290 model "三相变压器声固分析.mph"
// Outline of the model tree

Parameters
  w0 = 10.5[cm]
  h0 = 2*w0
  Core_tLeg = 2*w0
  Core_wWind = w1+w2+w3+w4+w5+w4+w6
  Core_hWind = 60.4[cm]
  Core_wSlit = Core_tLeg
  w_tot = w0+w1+w2+w3+w4+w5+w4+w6+2*w0
  h_tot = 176[cm]
  wTrans = 3*Core_tLeg + 2*Core_wWind
  hTrans = 2*Core_tLeg + Core_hWind
  Core_nLam = 7
  Core_wLam = 3[cm]
  w1 = 4[cm]
  w2 = 2.8[cm]
  w3 = 1[cm]
  Prm_Rout = Prm_Rin+Prm_w
  w4a = 1.84[cm]
  w5 = 0.5[cm]
  Scn_Rout = Scn_Rin+Scn_w
  Scn_w = w2
  Scn_h = 19.2[cm]
  h3 = 2[cm]
  Prm_h = 9.25[cm]
  Prm_w = w4a+w5+w4b
  w6 = 18[cm]
  h5 = Scn_h-2*Prm_h
  Scn_Rin = w0+w1
  Prm_Rin = w0+w1+w2+w3
  Scn_Ravg = (Scn_Rin+Scn_Rout)/2
  Prm_Ravg = (Prm_Rin+Prm_Rout)/2
  signum = 10[S/m]
  skd = 1/sqrt(pi*50[Hz]*3e7[S/m]*mu0_const)
  Core_tLam = 2.5[cm]
  w4b = 1.38[cm]
  w4 = w4a+w4b
  Prm_Asp = 8.51[mm^2]
  Scn_Asp = 1.68[cm^2]
  Prm_N = 693
  Scn_N = 32

Variables
  var1 "变量 1"
    Sn = 400[kV*A]
    V1n_c_RMS = 15[kV]
    V2n_c_RMS = 400[V]
    I1n_I_RMS = Sn/V1n_c_RMS/sqrt(3)
    I2n_I_RMS = Sn/V2n_c_RMS/sqrt(3)
    V1n_f_RMS = V1n_c_RMS/sqrt(3)
    V2n_f_RMS = V2n_c_RMS
    I1n_f_RMS = I1n_I_RMS
    I2n_f_RMS = I2n_I_RMS/sqrt(3)
    V1n_f = V1n_f_RMS/sqrt(2)
    V2n_f = V2n_f_RMS*sqrt(2)
    I1n_f = I1n_f_RMS*sqrt(2)/10
    I2n_f = I2n_f_RMS*sqrt(2)
    Kc = V1n_c_RMS/V2n_c_RMS
    Kf_V = V1n_f/V2n_f
    Kf_I = I1n_f/I2n_f
    Np = 693
    Ns = 32
    Kf_N = Np/Ns

Selections
  sel1: Explicit "磁芯" on domains 12-19
  sel2: Explicit "初级线圈" on domains 6, 7, 20, 21, 30, 31
  sel3: Explicit "次级线圈" on domains 10, 11, 24, 25, 34, 35
  uni1: Union "线圈" | entitydim = 3; input = {sel2, sel3}
  uni2: Union "变压器" | entitydim = 3; input = {sel1, uni1}
  com1: Complement "空气" | entitydim = 3; input = {uni2}
  sel4: Explicit "空气边界" on boundaries 9-12, 179, 180, 192, 195
  selTemp: Union "并集" | entitydim = 3

Probes
  pdom1: DomainPoint "域点探针 1"
    first = {-28.0124040758, 3.91014645927, 167.0450142048257}
    second = {27.9558106206, -3.90224664921, -166.7075292594605}
    coords = {-28.0124042, 3.9101464, 167.0450142}
    ppb1: PointExpr "点探针表达式 1" | expr = u; unit = cm; descr = 位移场，X 分量; table = tbl1
    ppb2: PointExpr "点探针表达式 2" | expr = v; unit = cm; descr = 位移场，Y 分量; table = tbl1
    ppb3: PointExpr "点探针表达式 3" | expr = w; unit = cm; descr = 位移场，Z 分量; table = tbl1

Coordinate systems
  pml1: PML "完美匹配层 1" on domains 1-4, 26-29 | ScalingType = Spherical; wavelengthSource = acpr

Geometry
  geom1 "几何 1" (3D, length unit cm)
    wp1: WorkPlane "工作平面 1" | quickplane = xz; quicky = Core_tLam*0; unite = on
      r1: Rectangle "矩形 1" | size = {wTrans-0*Core_wLam, hTrans-0*Core_wLam}; base = center
      r2: Rectangle "矩形 2"
        size = {Core_wWind+0*Core_wLam, Core_hWind+0*Core_wLam}
        base = center
        pos = {-Core_tLeg/2-Core_wWind/2, 0}
      mir1: Mirror "镜像 1" | input = r2; keep = on; axis = {1, 0}
      dif1: Difference "差集 1" | input = r1; input2 = mir1, r2
    ext1: Extrude "拉伸 1" | workplane = wp1; input = wp1; distance = Core_tLam; reverse = on
    wp2: WorkPlane "工作平面 2" | quickplane = xz; quicky = Core_tLam*1; unite = on
      r1: Rectangle "矩形 1" | size = {wTrans-1*Core_wLam, hTrans-1*Core_wLam}; base = center
      r2: Rectangle "矩形 2"
        size = {Core_wWind+1*Core_wLam, Core_hWind+1*Core_wLam}
        base = center
        pos = {-Core_tLeg/2-Core_wWind/2, 0}
      mir1: Mirror "镜像 1" | input = r2; keep = on; axis = {1, 0}
      dif1: Difference "差集 1" | input = r1; input2 = mir1, r2
    ext2: Extrude "拉伸 2" | workplane = wp2; input = wp2; distance = Core_tLam; reverse = on
    wp3: WorkPlane "工作平面 3" | quickplane = xz; quicky = Core_tLam*2; unite = on
      r1: Rectangle "矩形 1" | size = {wTrans-2*Core_wLam, hTrans-2*Core_wLam}; base = center
      r2: Rectangle "矩形 2"
        size = {Core_wWind+2*Core_wLam, Core_hWind+2*Core_wLam}
        base = center
        pos = {-Core_tLeg/2-Core_wWind/2, 0}
      mir1: Mirror "镜像 1" | input = r2; keep = on; axis = {1, 0}
      dif1: Difference "差集 1" | input = r1; input2 = mir1, r2
    ext3: Extrude "拉伸 3" | workplane = wp3; input = wp3; distance = Core_tLam; reverse = on
    wp4: WorkPlane "工作平面 4" | quickplane = xz; quicky = Core_tLam*3; unite = on
      r1: Rectangle "矩形 1" | size = {wTrans-3*Core_wLam, hTrans-3*Core_wLam}; base = center
      r2: Rectangle "矩形 2"
        size = {Core_wWind+3*Core_wLam, Core_hWind+3*Core_wLam}
        base = center
        pos = {-Core_tLeg/2-Core_wWind/2, 0}
      mir1: Mirror "镜像 1" | input = r2; keep = on; axis = {1, 0}
      dif1: Difference "差集 1" | input = r1; input2 = mir1, r2
    ext4: Extrude "拉伸 4" | workplane = wp4; input = wp4; distance = Core_tLam; reverse = on
    uni1: Union "并集 1" | input = ext1, ext2, ext3, ext4
    mir1: Mirror "镜像 1" | input = uni1; keep = on; axis = {0, 1, 0}
    wp5: WorkPlane "工作平面 5" | quickz = -Scn_h-h3/2; unite = on
      c1: Circle "圆 1" | r = Prm_Rin
      c2: Circle "圆 2" | r = Prm_Rout
      c3: Circle "圆 3" | r = Scn_Rin
      c4: Circle "圆 4" | r = Scn_Rout
      uni1: Union "并集 1" | input = c1, c2, c3, c4
      spl1: Split "拆分 1" | input = uni1
      del1: Delete "删除实体 1" | input = spl1(4) domains 1
      pol1: Polygon "多边形 1" | source = table; table = {{0, Scn_Rin}, {0, Prm_Rout}}
    ext5: Extrude "拉伸 5" | workplane = wp5; input = wp5; distance = Scn_h
    mir2: Mirror "镜像 2" | input = ext5; keep = on
    mov1: Move "移动 1" | input = ext5, mir2; keep = on; displx = w_tot-w0; disply = 0; displz = 0
    mov2: Move "移动 2" | input = ext5, mir2; keep = on; displx = -(w_tot-w0); disply = 0; displz = 0
    wp6: WorkPlane "工作平面 6" | quickz = 29; unite = on
    wp7: WorkPlane "工作平面 7" | quickz = -29; unite = on
    parf1: PartitionFaces "分割面 1"
      face = mir1(1) boundaries 20; uni1(1) boundaries 20
      partitionwith = workplane
      workplane = wp6
    parf2: PartitionFaces "分割面 2"
      face = parf1(1) boundaries 17; parf1(2) boundaries 20
      partitionwith = workplane
      workplane = wp7
    sph1: Sphere "球体 1" | r = 200; layername = 层 1; layer = 30; layernameold = 层 1
    fin: Finalize "形成联合体"

Materials
  mat1: Common "Air" on all domains
    def: def "Basic"
      thermalexpansioncoefficient = alpha_p(pA,T)
      molarmass = 0.02897[kg/mol]
      bulkviscosity = muB(T)
      relpermeability = 1
      relpermittivity = 1
      dynamicviscosity = eta(T)
      ratioofspecificheat = 1.4
      electricconductivity = signum
      heatcapacity = Cp(T)
      density = rho(pA,T)
      thermalconductivity = k(T)
      soundspeed = cs(T)
      eta: Piecewise | arg = T; pieces = {200.0, 1600.0, -8.38278E-7+8.35717342E-8*T^1-7.69429583E-11*T^2+4.6437266E-14*T^3-1.06585607E-17*T^4}; argunit = K; fununit = Pa*s
      Cp: Piecewise | arg = T; pieces = {200.0, 1600.0, 1047.63657-0.372589265*T^1+9.45304214E-4*T^2-6.02409443E-7*T^3+1.2858961E-10*T^4}; argunit = K; fununit = J/(kg*K)
      rho: Analytic | expr = pA*0.02897/R_const[K*mol/J]/T; args = {pA, T}; fununit = kg/m^3; argunit = {Pa, K}
      k: Piecewise | arg = T; pieces = {200.0, 1600.0, -0.00227583562+1.15480022E-4*T^1-7.90252856E-8*T^2+4.11702505E-11*T^3-7.43864331E-15*T^4}; argunit = K; fununit = W/(m*K)
      cs: Analytic | expr = sqrt(1.4*R_const[K*mol/J]/0.02897*T); args = T; fununit = m/s; argunit = K
      an1: Analytic | funcname = alpha_p; expr = -1/rho(pA,T)*d(rho(pA,T),T); args = {pA, T}; fununit = 1/K; argunit = {Pa, K}
      an2: Analytic "Analytic 2a" | funcname = muB; expr = 0.6*eta(T); args = T; fununit = Pa*s; argunit = K
    RefractiveIndex: RefractiveIndex
      n = 1
      ki = 0
    NonlinearModel: NonlinearModel
      BA = def.gamma-1
    idealGas: idealGas
      Rs = R_const/Mn
      heatcapacity = Cp(T)
      ratioofspecificheat = 1.4
      molarmass = 0.02897[kg/mol]
      Cp: Piecewise | arg = T; pieces = {200.0, 1600.0, 1047.63657-0.372589265*T^1+9.45304214E-4*T^2-6.02409443E-7*T^3+1.2858961E-10*T^4}; argunit = K; fununit = J/(kg*K)
  mat2: Common "Copper" on selection uni1
    def: def "Basic"
      relpermeability = 1
      electricconductivity = 5.998e7[S/m]
      thermalexpansioncoefficient = 17e-6[1/K]
      heatcapacity = 385[J/(kg*K)]
      relpermittivity = 1
      density = 8960[kg/m^3]
      thermalconductivity = 400[W/(m*K)]
    Enu: Enu "Young's modulus and Poisson's ratio"
      E = 110[GPa]
      nu = 0.35
    linzRes: linzRes "Linearized resistivity"
      rho0 = 1.72e-8[ohm*m]
      alpha = 0.0039[1/K]
      Tref = 298[K]
  mat3: Common "Soft Iron (Without Losses)" on selection sel1
    def: def "Basic"
      electricconductivity = signum
      relpermittivity = 1
      density = 7870
    BHCurve: BHCurve
      normB = BH(normHin)
      normH = BH_inv(normBin)
      Wpm = BH_prim(normHin)
      normHin = sqrt(H1^2+H2^2+H3^2+eps)
      DESCR_PREFIX:normHin = 磁场模
      normBin = sqrt(B1^2+B2^2+B3^2+eps)
      DESCR_PREFIX:normBin = 磁通密度模
      BH: Interpolation
        funcnametable = {BH, 1}
        table = 
          {0, 0}
          {663.146, 1}
          {1067.5, 1.1}
          {1705.23, 1.2}
          {2463.11, 1.3}
          {3841.67, 1.4}
          {5425.74, 1.5}
          {7957.75, 1.6}
          {12298.3, 1.7}
          {20462.8, 1.8}
          {32169.6, 1.9}
          {61213.4, 2}
          {111408, 2.1}
          {188487.757, 2.2}
          {267930.364, 2.3}
          {347507.836, 2.4}
        extrap = linear
        fununit = T
        argunit = A/m
        defineinv = on
        defineprimfun = on
    EffectiveBHCurve: EffectiveBHCurve
      normBeff = BHeff(normHeffin)
      normHeff = BHeff_inv(normBeffin)
      Wpmeff = BHeff_prim(normHeffin)
      normHeffin = sqrt(realdot(H1,H1)+realdot(H2,H2)+realdot(H3,H3)+eps)
      DESCR_PREFIX:normHeffin = 有效磁场模
      normBeffin = sqrt(realdot(B1,B1)+realdot(B2,B2)+realdot(B3,B3)+eps)
      DESCR_PREFIX:normBeffin = 有效磁通密度模
      BHeff: Interpolation
        funcnametable = {BHeff, 1}
        table = 
          {0, 0}
          {663.146, 1.00000005169}
          {1067.5, 1.49364951241}
          {1705.23, 1.94153284613}
          {2463.11, 2.25776566937}
          {3841.67, 2.60998064243}
          {5425.74, 2.86644520908}
          {7957.75, 3.14414380972}
          {12298.3, 3.44853805165}
          {20462.8, 3.78167119737}
          {32169.6, 4.05834559011}
          {61213.4, 4.42064655295}
          {111408, 4.72127408955}
          {188487.757, 4.97214814072}
          {267930.364, 5.14551086086}
          {347507.836, 5.24551086143}
        extrap = linear
        fununit = T
        argunit = A/m
        defineinv = on
        defineprimfun = on
    Magnetostrictive: Magnetostrictive "磁致伸缩"
      Ms = 1.5e6*1e4
      lambdas = 200[ppm]
    Enu: Enu "杨氏模量和泊松比"
      E = 60e9
      nu = 0.45
    JilesAtherton: JilesAtherton "Jiles-Atherton 模型参数"
      alphaJA = 10e3

Physics
  mf: InductionCurrents "磁场" on all domains
    dependent variable A = {Ax, Ay, Az}
    ShapeProperty.order_magneticvectorpotential = 1
    fsp1: FreeSpace "自由空间 1" (default)
    mi1: MagneticInsulation "磁绝缘 1" (default)
    init1: init "初始值 1" (default)
    coil1: Coil "初级线圈 1 - U" on domains 21
      ConductorModel = Multi
      CoilExcitation = Current
      CoilType = Numeric
      CoilName = P1U
      ICoil = I1n_f
      VCoil = V1n_f
      N = Np
      AreaFrom = UserDefined
      coilWindArea = Prm_Asp
      materialType = nonSolid
      ccc1: CoilCurrentCalculation "几何分析 1" (default)
        ct1: CoilTerminal "输入 1" on boundaries 207
    coil2: Coil "初级线圈 1 - V" on domains 7
      ConductorModel = Multi
      CoilExcitation = Current
      CoilType = Numeric
      CoilName = P1V
      ICoil = I1n_f*exp(-j*2*pi/3)
      VCoil = V1n_f*exp(-j*2*pi/3)
      N = Np
      AreaFrom = UserDefined
      coilWindArea = Prm_Asp
      materialType = nonSolid
      ccc1: CoilCurrentCalculation "几何分析 1" (default)
        ct1: CoilTerminal "输入 1" on boundaries 102
    coil3: Coil "初级线圈 1 - W" on domains 31
      ConductorModel = Multi
      CoilExcitation = Current
      CoilType = Numeric
      CoilName = P1W
      ICoil = I1n_f*exp(+j*2*pi/3)
      VCoil = V1n_f*exp(+j*2*pi/3)
      N = Np
      AreaFrom = UserDefined
      coilWindArea = Prm_Asp
      materialType = nonSolid
      ccc1: CoilCurrentCalculation "几何分析 1" (default)
        ct1: CoilTerminal "输入 1" on boundaries 298
    coil4: Coil "初级线圈 2 - U" on domains 20
      ConductorModel = Multi
      CoilExcitation = Current
      CoilType = Numeric
      CoilName = P2U
      ICoil = I1n_f
      VCoil = V1n_f
      N = Np
      AreaFrom = UserDefined
      coilWindArea = Prm_Asp
      materialType = nonSolid
      ccc1: CoilCurrentCalculation "几何分析 1" (default)
        ct1: CoilTerminal "输入 1" on boundaries 205
    coil5: Coil "初级线圈 2 - V" on domains 6
      ConductorModel = Multi
      CoilExcitation = Current
      CoilType = Numeric
      CoilName = P2V
      ICoil = I1n_f*exp(-j*2*pi/3)
      VCoil = V1n_f*exp(-j*2*pi/3)
      N = Np
      AreaFrom = UserDefined
      coilWindArea = Prm_Asp
      materialType = nonSolid
      ccc1: CoilCurrentCalculation "几何分析 1" (default)
        ct1: CoilTerminal "输入 1" on boundaries 100
    coil6: Coil "初级线圈 2 - W" on domains 30
      ConductorModel = Multi
      CoilExcitation = Current
      CoilType = Numeric
      CoilName = P2W
      ICoil = I1n_f*exp(+j*2*pi/3)
      VCoil = V1n_f*exp(+j*2*pi/3)
      N = Np
      AreaFrom = UserDefined
      coilWindArea = Prm_Asp
      materialType = nonSolid
      ccc1: CoilCurrentCalculation "几何分析 1" (default)
        ct1: CoilTerminal "输入 1" on boundaries 296
    coil7: Coil "次级线圈 1 - U" on domains 25
      ConductorModel = Multi
      CoilExcitation = Voltage
      CoilType = Numeric
      CoilName = S1U
      ICoil = 0[A]
      VCoil = V2n_f
      N = Ns
      AreaFrom = UserDefined
      coilWindArea = Scn_Asp
      materialType = nonSolid
      ccc1: CoilCurrentCalculation "几何分析 1" (default)
        ct1: CoilTerminal "输入 1" on boundaries 199
    coil8: Coil "次级线圈 1 - V" on domains 11
      ConductorModel = Multi
      CoilExcitation = Voltage
      CoilType = Numeric
      CoilName = S1V
      ICoil = 0[A]
      VCoil = V2n_f*exp(-j*2*pi/3)
      N = Ns
      AreaFrom = UserDefined
      coilWindArea = Scn_Asp
      materialType = nonSolid
      ccc1: CoilCurrentCalculation "几何分析 1" (default)
        ct1: CoilTerminal "输入 1" on boundaries 94
    coil9: Coil "次级线圈 1 - W" on domains 35
      ConductorModel = Multi
      CoilExcitation = Voltage
      CoilType = Numeric
      CoilName = S1W
      ICoil = 0[A]
      VCoil = V2n_f*exp(+j*2*pi/3)
      N = Ns
      AreaFrom = UserDefined
      coilWindArea = Scn_Asp
      materialType = nonSolid
      ccc1: CoilCurrentCalculation "几何分析 1" (default)
        ct1: CoilTerminal "输入 1" on boundaries 290
    coil10: Coil "次级线圈 2 - U" on domains 24
      ConductorModel = Multi
      CoilExcitation = Voltage
      CoilType = Numeric
      CoilName = S2U
      ICoil = 0[A]
      VCoil = V2n_f
      N = Ns
      AreaFrom = UserDefined
      coilWindArea = Scn_Asp
      materialType = nonSolid
      ccc1: CoilCurrentCalculation "几何分析 1" (default)
        ct1: CoilTerminal "输入 1" on boundaries 197
    coil11: Coil "次级线圈 2 - V" on domains 10
      ConductorModel = Multi
      CoilExcitation = Voltage
      CoilType = Numeric
      CoilName = S2V
      ICoil = 0[A]
      VCoil = V2n_f*exp(-j*2*pi/3)
      N = Ns
      AreaFrom = UserDefined
      coilWindArea = Scn_Asp
      materialType = nonSolid
      ccc1: CoilCurrentCalculation "几何分析 1" (default)
        ct1: CoilTerminal "输入 1" on boundaries 92
    coil12: Coil "次级线圈 2 - W" on domains 34
      ConductorModel = Multi
      CoilExcitation = Voltage
      CoilType = Numeric
      CoilName = S2W
      ICoil = 0[A]
      VCoil = V2n_f*exp(+j*2*pi/3)
      N = Ns
      AreaFrom = UserDefined
      coilWindArea = Scn_Asp
      materialType = nonSolid
      ccc1: CoilCurrentCalculation "几何分析 1" (default)
        ct1: CoilTerminal "输入 1" on boundaries 288
    alnm1: AmperesLawNonlinearMagnetostrictive "安培定律，非线性磁致伸缩 1" on selection sel1
      MagnetizationModel = Linear
      chi0_mat = userdef
      chi0 = 1000
    fcal1: ForceCalculation "力计算 1" on selection uni1
  solid: SolidMechanics "固体力学" on selection uni2
    dependent variable u = {u, v, w}
    ShapeProperty.order_displacement = 1
    lemm1: LinearElasticModel "线弹性材料 1" (default)
    free1: Free "自由 1" (default)
    init1: init "初始值 1" (default)
    fix1: Fixed "固定约束 1" on boundaries 43, 47
    roll1: Roller "辊支承 1" on boundaries 71, 74, 81, 83
    roll2: Roller "辊支承 2" on boundaries 44, 48
    bl1: BodyLoad "体载荷 1" on selection uni2
  acpr: PressureAcoustics "压力声学，频域" on selection com1
    dependent variable p
    fpam1: FrequencyPressureAcousticsModel "压力声学 1" (default)
    shb1: SoundHard "硬声场边界（壁） 1" (default)
    init1: init "初始值 1" (default)
    efc1: ExteriorFieldCalculation "外场计算 1" on selection sel4

Multiphysics
  npzm1: NonlinearMagnetostriction "非线性磁致伸缩 1" on selection sel1
    MagnetostrictionModel = NonlinearIsotropic
    Solid_physics = solid
    MagneticFields_physics = mf
  mmcpl1: Magnetomechanics "磁力学 1" on selection uni1 | OnlyLorentz = 1; Solid_physics = solid; MagneticFields_physics = mf
  asb1: AcousticStructureBoundary "声-结构边界 1" on all boundaries | Acoustics_physics = acpr; Structure_physics = solid

Mesh
  mesh1 "网格 1"
    size: MeshSizeDefault "大小" | hauto = 3
    ftri1: FreeTri "自由三角形网格 1" on boundaries 15, 19, 23, 27, 31, 35, 138, 142, 146, 150, 154, 158, 244, 248, 252, 256, 260, 264
    swe1: Sweep "扫掠 1" on domains 6-11, 20-25, 30-35
      dis1: Distribution "分布 1" on domains 6-11, 20-25, 30-35
    ftet1: FreeTet "自由四面体网格 1" on domains 5, 12-19
      size1: Size "大小 1" on domains 12-19 | hauto = 3
    swe2: Sweep "扫掠 2" on domains 1-4, 26-29
      dis1: Distribution "分布 1" on all domains
    bl1: BndLayer "边界层 1" on no domains
      blp: BndLayerProp "边界层属性" on selection sel4 | blnlayers = 1

Studies
  std4 "研究 0 线圈几何分析"
    ccc: CoilCurrentCalculation "线圈几何分析" | solve for = {mf}
  std1 "研究 1 正常工况 频域"
    freq: Frequency "频域" | plist = 50; activateCoupling = {npzm1, on, mmcpl1, on, asb1, on}; usesol = on; notstudy = std4
  std2 "研究 2 正常工况 特征频率"
    eig: Eigenfrequency "特征频率"
      shift = 1[Hz]
      chkeigregion = on
      linpsolnum = auto
      usesol = on
      notsolmethod = sol
      notstudy = std4
      filtereigdescription = Damped natural frequency
  std3 "研究 3 正常工况 瞬态"
    time: Transient "瞬态"
      tlist = range(0,0.002,0.04)
      solve for = {mf, solid}
      usesol = on
      notsolmethod = sol
      notstudy = std4
      notsol = current
  std5 "研究 4 次级开路 频域"
    freq: Frequency "频域" | plist = 50; usesol = on; notsolmethod = sol; notstudy = std4
  std7 "研究 5 次级开路 特征频率"
    eig: Eigenfrequency "特征频率"
      shift = 1[Hz]
      chkeigregion = on
      linpsolnum = auto
      usesol = on
      notsolmethod = sol
      notstudy = std4
      filtereigdescription = Damped natural frequency
  std8 "研究 6 次级开路 瞬态"
    time: Transient "瞬态"
      tlist = range(0,0.002,0.04)
      solve for = {mf, solid}
      usesol = on
      notsolmethod = sol
      notstudy = std4
  std6 "研究 7 次级短路 频域"
    freq: Frequency "频域" | plist = 50; usesol = on; notsolmethod = sol; notstudy = std4
  std9 "研究 8 次级短路 特征频率"
    eig: Eigenfrequency "特征频率"
      shift = 1[Hz]
      chkeigregion = on
      linpsolnum = auto
      usesol = on
      notsolmethod = sol
      notstudy = std4
      filtereigdescription = Damped natural frequency
  std10 "研究 9 次级短路 瞬态"
    time: Transient "瞬态"
      tlist = range(0,0.002,0.04)
      solve for = {mf, solid}
      usesol = on
      notsolmethod = sol
      notstudy = std4

Solver configurations
  sol1 "解 1" (study std1)
    v1: Variables "因变量 1"
    s1: Stationary "稳态求解器 1"
      p1: Parametric "参数化 1"
      i1: Iterative "迭代 1" | linsolver = fgmres
        va1: Vanka
      fc1: FullyCoupled "全耦合 1" | linsolver = i1
  sol2 "解 2" (study std2)
    v1: Variables "因变量 1"
    e1: Eigenvalue "特征值求解器 1"
      d1: Direct "Suggested Direct Solver (asb1_mmcpl1) (已合并)"
  sol3 "解 3" (study std3)
    v1: Variables "因变量 1"
    t1: Time "瞬态求解器 1"
      d1: Direct "直接 1"
      fc1: FullyCoupled "全耦合 1"
  sol4 "解 4" (study std4)
    v1: Variables "因变量 1"
    s1: Stationary "稳态求解器 1"
      dDef: Direct "直接"
      se1: Segregated "分离 1"
        ss1: SegregatedStep "分离步骤 1"
        ss2: SegregatedStep "分离步骤 2"
  sol5 "解 5" (study std6)
    v1: Variables "因变量 1"
    s1: Stationary "稳态求解器 1"
      p1: Parametric "参数化 1"
      i2: Iterative "迭代 2" | linsolver = fgmres
        ilDef: IncompleteLU "不完全 LU 分解"
      fc1: FullyCoupled "全耦合 1"
  sol6 "解 6" (study std5)
    // same settings as sol5
  sol7 "解 7" (study std8)
    v1: Variables "因变量 1"
    t1: Time "瞬态求解器 1"
      d1: Direct "直接 1"
      fc1: FullyCoupled "全耦合 1"
  sol8 "解 8" (study std10)
    v1: Variables "因变量 1"
    t1: Time "瞬态求解器 1"
      d1: Direct "直接 1"
      fc1: FullyCoupled "全耦合 1"
  sol9 "解 9" (study std7)
    v1: Variables "因变量 1"
    e1: Eigenvalue "特征值求解器 1"
      d1: Direct "Suggested Direct Solver (asb1_mmcpl1) (已合并)"
  sol10 "解 10" (study std9)
    v1: Variables "因变量 1"
    e1: Eigenvalue "特征值求解器 1"
      d1: Direct "Suggested Direct Solver (asb1_mmcpl1) (已合并)"

Datasets
  dset1: Solution | solution = sol1
  dset2: Solution | solution = sol2
  dset3: Solution | solution = sol3
  dset4: Solution | solution = sol4
  dset5: Solution | solution = sol5
  dset6: Solution | solution = sol6
  dset7: Solution | solution = sol7
  dset8: Solution | solution = sol8
  dset9: Solution | solution = sol9
  dset10: Solution | solution = sol10
  dset11: Solution "探针解 11" | solution = sol3
  cpt1: CutPoint3D "域点探针 1" | data = dset11; pointx = -28.0124042; pointy = 3.9101464; pointz = 167.0450142

Derived values
  pev1: EvalPoint "点探针表达式 1" | data = cpt1; table = tbl1; expr = u
  pev2: EvalPoint "点探针表达式 2" | data = cpt1; table = tbl1; expr = v
  pev3: EvalPoint "点探针表达式 3" | data = cpt1; table = tbl1; expr = w

Evaluation groups
  std2EvgFrq: EvaluationGroup "特征频率 1" | data = dset2
    gev1: EvalGlobal "全局计算 1"
      expr = {2*pi*freq, imag(freq)/abs(freq), abs(freq)/imag(freq)/2}
      unit = {rad/s, 1, 1}
      descr = {角频率, 阻尼比, 品质因子}
  std2EvgFrq1: EvaluationGroup "特征频率 4" | data = dset9
    gev1: EvalGlobal "全局计算 1" | expr = {2*pi*freq, imag(freq)/abs(freq), abs(freq)/imag(freq)/2}
  std2EvgFrq2: EvaluationGroup "特征频率 7" | data = dset10
    gev1: EvalGlobal "全局计算 1" | expr = {2*pi*freq, imag(freq)/abs(freq), abs(freq)/imag(freq)/2}

Tables
  tbl1: Table "探针表 1"
    时间 (s) | 位移场，X 分量 (cm), 点: (-28.012, 3.9101, 167.05) | 位移场，Y 分量 (cm), 点: (-28.012, 3.9101, 167.05) | 位移场，Z 分量 (cm), 点: (-28.012, 3.9101, 167.05)
    0.0055505 | nan | nan | nan
    0.00555481 | nan | nan | nan
    0.00555696 | nan | nan | nan
    0.00555911 | nan | nan | nan
    0.00556127 | nan | nan | nan
    0.00556342 | nan | nan | nan
    0.00556557 | nan | nan | nan
    0.00556988 | nan | nan | nan
    0.00557203 | nan | nan | nan
    0.00557419 | nan | nan | nan
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
Plots
  pg1: PlotGroup3D "磁通密度 (mf)" | data = dset1
    mslc1: Multislice "多切面 1"
      expr = mf.normB
      multiplanexmethod = coord
      xcoord = mf.CPx
      multiplaneymethod = coord
      ycoord = mf.CPy
      multiplanezmethod = coord
      zcoord = mf.CPz
    strmsl1: StreamlineMultislice "多切面上的流线 1"
      expr = {mf.Bx, mf.By, mf.Bz}
      multiplanexmethod = coord
      xcoord = mf.CPx
      multiplaneymethod = coord
      ycoord = mf.CPy
      multiplanezmethod = coord
      zcoord = mf.CPz
      udist = 0.02
      maxsteps = 5000
      col1: Color "颜色表达式 1" | expr = mf.normB
      filt1: Filter "过滤器 1" | expr = !isScalingSystemDomain
  pg2: PlotGroup3D "应力 (磁致伸缩)" on selection sel1 | data = dset1
    vol1: Volume "体 1" | expr = solid.misesGp; descr = von Mises 应力
      def: Deform "变形" | expr = {u, v, w}; descr = 位移场
  pg31: PlotGroup3D "应力 (磁场力)" on selection uni1 | data = dset1
    vol1: Volume "体 1" | data = dset1; expr = solid.misesGp; descr = von Mises 应力
      def: Deform "变形" | expr = {u, v, w}; descr = 位移场
    surf1: Surface "表面 1" | expr = 1
      sel1: Selection "选择 1" on selection sel1
  pg3: PlotGroup3D "声压 (acpr)" | data = dset1
    surf1: Surface "表面 1" | expr = acpr.p_t
  pg4: PlotGroup3D "声压级 (acpr)" | data = dset1
    surf1: Surface "表面 1" | expr = acpr.Lp_t
  pg5: PlotGroup3D "声压，等值面 (acpr)" | data = dset1
    iso1: Isosurface "等值面 1" | expr = acpr.p_t
  pg6: PlotGroup3D "外场声压级 (acpr)" | data = dset1
    rp1: RadiationPattern "辐射方向图 1" | expr = acpr.efc1.Lp_pext; thetadisc = 40; phidisc = 60
  pg7: PlotGroup2D "外场压力 (acpr)" | data = none
    rp1: RadiationPattern "辐射方向图 1" | data = dset1; expr = acpr.efc1.pext; thetadisc = 40; phidisc = 60
  pg8: PolarGroup "外场声压级 xy 平面 (acpr)" | data = dset1
    rp1: RadiationPattern "辐射方向图 1" | expr = acpr.efc1.Lp_pext; phidisc = 180
  pg9: PlotGroup3D "SPL" | data = dset1
    mslc1: Multislice "多切面 1" | expr = acpr.Lp_t; descr = 总声压级; xnumber = 0; znumber = 0
    surf1: Surface "表面 1" | expr = 1
      sel1: Selection "选择 1" on boundaries 41-83, 106-135, 164-173, 212-241, 270-279, 302-309
    surf2: Surface "表面 2" | expr = sqrt(mf.Jx^2+mf.Jy^2)
      sel1: Selection "选择 1" on boundaries 13-40, 84-105, 136-163, 181-188, 197-210, 242-269, 280-301
  pg11: PlotGroup3D "位移（磁致伸缩）" | data = dset1
    surf1: Surface "表面 1" | expr = solid.disp; descr = 位移大小
      sel1: Selection "选择 1" on boundaries 41-83, 106-135, 164-173, 212-241, 270-279, 302-309
      def1: Deform "变形 1" | expr = {u, v, w}
  pg10: PlotGroup3D "位移（磁场力）" | data = dset1
    surf1: Surface "表面 1" | expr = solid.disp; descr = 位移大小
      sel1: Selection "选择 1" on boundaries 13-40, 84-105, 136-163, 181-188, 197-210, 242-269, 280-301
      def1: Deform "变形 1" | expr = {u, v, w}
    surf2: Surface "表面 2" | expr = 1
      sel1: Selection "选择 1" on boundaries 41-83, 106-135, 164-173, 212-241, 270-279, 302-309
  pg12: PlotGroup3D "磁通密度 (mf) 1" | data = dset2
    mslc1: Multislice "多切面 1"
      expr = mf.normB
      multiplanexmethod = coord
      xcoord = mf.CPx
      multiplaneymethod = coord
      ycoord = mf.CPy
      multiplanezmethod = coord
      zcoord = mf.CPz
    strmsl1: StreamlineMultislice "多切面上的流线 1"
      expr = {mf.Bx, mf.By, mf.Bz}
      multiplanexmethod = coord
      xcoord = mf.CPx
      multiplaneymethod = coord
      ycoord = mf.CPy
      multiplanezmethod = coord
      zcoord = mf.CPz
      udist = 0.02
      maxsteps = 5000
      col1: Color "颜色表达式 1" | expr = mf.normB
      filt1: Filter "过滤器 1" | expr = !isScalingSystemDomain
  pg13: PlotGroup3D "振型 (solid)" | data = dset2
    surf1: Surface "表面 1" | expr = solid.disp
      def: Deform "变形" | expr = {u, v, w}; descr = 位移场
  pg14: PlotGroup3D "声压 (acpr) 1" | data = dset2
    surf1: Surface "表面 1" | expr = acpr.p_t
    con1: Contour "等值线 1" | expr = acpr.p_t
  pg15: PlotGroup3D "声压级 (acpr) 1" | data = dset2
    surf1: Surface "表面 1" | expr = acpr.Lp_t
  pg17: PlotGroup3D "外场声压级 (acpr) 1" | data = dset2
    rp1: RadiationPattern "辐射方向图 1" | expr = acpr.efc1.Lp_pext; thetadisc = 40; phidisc = 60
  pg18: PlotGroup2D "外场压力 (acpr) 1" | data = none
    rp1: RadiationPattern "辐射方向图 1" | data = dset2; expr = acpr.efc1.pext; thetadisc = 40; phidisc = 60
  pg19: PolarGroup "外场声压级 xy 平面 (acpr) 1" | data = dset2
    rp1: RadiationPattern "辐射方向图 1" | expr = acpr.efc1.Lp_pext; phidisc = 180
  pg20: PlotGroup3D "磁通密度 (mf) 2" | data = dset3
    mslc1: Multislice "多切面 1" | expr = mf.normB
    strmsl1: StreamlineMultislice "多切面上的流线 1" | expr = {mf.Bx, mf.By, mf.Bz}
      col1: Color "颜色表达式 1" | expr = mf.normB
      filt1: Filter "过滤器 1" | expr = !isScalingSystemDomain
  pg21: PlotGroup3D "应力 (磁致伸缩) 2" on selection sel1 | data = dset3
    vol1: Volume "体 1" | expr = solid.misesGp; descr = von Mises 应力
      def: Deform "变形" | expr = {u, v, w}
  pg32: PlotGroup3D "应力 (磁场力) 2" on selection uni1 | data = dset3
    vol1: Volume "体 1" | expr = solid.misesGp
      def: Deform "变形" | expr = {u, v, w}
    surf1: Surface "表面 1" | expr = mf.normB
      sel1: Selection "选择 1" on selection sel1
  pg29: PlotGroup3D "位移（磁致伸缩） 2" | data = dset3
    surf1: Surface "表面 1" | expr = solid.disp
      sel1: Selection "选择 1" on boundaries 41-83, 106-135, 164-173, 212-241, 270-279, 302-309
      def1: Deform "变形 1" | expr = {u, v, w}
  pg30: PlotGroup3D "位移（磁场力） 2" | data = dset3
    surf1: Surface "表面 1" | expr = solid.disp
      sel1: Selection "选择 1" on boundaries 13-40, 84-105, 136-163, 181-188, 197-210, 242-269, 280-301
      def1: Deform "变形 1" | expr = {u, v, w}
    surf2: Surface "表面 2" | expr = 1
      sel1: Selection "选择 1" on boundaries 41-83, 106-135, 164-173, 212-241, 270-279, 302-309
  pg33: PlotGroup3D "磁通密度 (mf) 3" | data = dset6
    mslc1: Multislice "多切面 1" | expr = mf.normB
    strmsl1: StreamlineMultislice "多切面上的流线 1" | expr = {mf.Bx, mf.By, mf.Bz}
      col1: Color "颜色表达式 1" | expr = mf.normB
      filt1: Filter "过滤器 1" | expr = !isScalingSystemDomain
  pg34: PlotGroup3D "应力 (磁致伸缩) 3" on selection sel1 | data = dset6
    vol1: Volume "体 1" | expr = solid.misesGp
      def: Deform "变形" | expr = {u, v, w}
  pg35: PlotGroup3D "应力 (磁场力) 3" on selection uni1 | data = dset6
    vol1: Volume "体 1" | expr = solid.misesGp
      def: Deform "变形" | expr = {u, v, w}
    surf1: Surface "表面 1" | expr = 1
      sel1: Selection "选择 1" on selection sel1
  pg36: PlotGroup3D "声压 (acpr) 3" | data = dset6
    surf1: Surface "表面 1" | expr = acpr.p_t
  pg37: PlotGroup3D "声压级 (acpr) 3" | data = dset6
    surf1: Surface "表面 1" | expr = acpr.Lp_t
  pg38: PlotGroup3D "声压，等值面 (acpr) 3" | data = dset6
    iso1: Isosurface "等值面 1" | expr = acpr.p_t
  pg39: PlotGroup3D "外场声压级 (acpr) 3" | data = dset6
    rp1: RadiationPattern "辐射方向图 1" | expr = acpr.efc1.Lp_pext
  pg40: PlotGroup2D "外场压力 (acpr) 3"
    rp1: RadiationPattern "辐射方向图 1" | data = dset6; expr = acpr.efc1.pext
  pg41: PolarGroup "外场声压级 xy 平面 (acpr) 3" | data = dset6
    rp1: RadiationPattern "辐射方向图 1" | expr = acpr.efc1.Lp_pext
  pg42: PlotGroup3D "SPL 3" | data = dset6
    mslc1: Multislice "多切面 1" | expr = acpr.Lp_t
    surf1: Surface "表面 1" | expr = 1
      sel1: Selection "选择 1" on boundaries 41-83, 106-135, 164-173, 212-241, 270-279, 302-309
    surf2: Surface "表面 2" | expr = sqrt(mf.Jx^2+mf.Jy^2)
      sel1: Selection "选择 1" on boundaries 13-40, 84-105, 136-163, 181-188, 197-210, 242-269, 280-301
  pg43: PlotGroup3D "位移（磁致伸缩） 3" | data = dset6
    surf1: Surface "表面 1" | expr = solid.disp
      sel1: Selection "选择 1" on boundaries 41-83, 106-135, 164-173, 212-241, 270-279, 302-309
      def1: Deform "变形 1" | expr = {u, v, w}
  pg44: PlotGroup3D "位移（磁场力） 3" | data = dset6
    surf1: Surface "表面 1" | expr = solid.disp
      sel1: Selection "选择 1" on boundaries 13-40, 84-105, 136-163, 181-188, 197-210, 242-269, 280-301
      def1: Deform "变形 1" | expr = {u, v, w}
    surf2: Surface "表面 2" | expr = 1
      sel1: Selection "选择 1" on boundaries 41-83, 106-135, 164-173, 212-241, 270-279, 302-309
  pg45: PlotGroup3D "磁通密度 (mf) 4" | data = dset9
    mslc1: Multislice "多切面 1" | expr = mf.normB
    strmsl1: StreamlineMultislice "多切面上的流线 1" | expr = {mf.Bx, mf.By, mf.Bz}
      col1: Color "颜色表达式 1" | expr = mf.normB
      filt1: Filter "过滤器 1" | expr = !isScalingSystemDomain
  pg46: PlotGroup3D "振型 (solid) 4" | data = dset9
    surf1: Surface "表面 1" | expr = solid.disp
      def: Deform "变形" | expr = {u, v, w}
  pg47: PlotGroup3D "声压 (acpr) 4" | data = dset9
    surf1: Surface "表面 1" | expr = acpr.p_t
    con1: Contour "等值线 1" | expr = acpr.p_t
  pg48: PlotGroup3D "声压级 (acpr) 4" | data = dset9
    surf1: Surface "表面 1" | expr = acpr.Lp_t
  pg49: PlotGroup3D "外场声压级 (acpr) 4" | data = dset9
    rp1: RadiationPattern "辐射方向图 1" | expr = acpr.efc1.Lp_pext
  pg50: PlotGroup2D "外场压力 (acpr) 4"
    rp1: RadiationPattern "辐射方向图 1" | data = dset9; expr = acpr.efc1.pext
  pg51: PolarGroup "外场声压级 xy 平面 (acpr) 4" | data = dset9
    rp1: RadiationPattern "辐射方向图 1" | expr = acpr.efc1.Lp_pext
  pg52: PlotGroup3D "磁通密度 (mf) 5" | data = dset7
    mslc1: Multislice "多切面 1" | expr = mf.normB
    strmsl1: StreamlineMultislice "多切面上的流线 1" | expr = {mf.Bx, mf.By, mf.Bz}
      col1: Color "颜色表达式 1" | expr = mf.normB
      filt1: Filter "过滤器 1" | expr = !isScalingSystemDomain
  pg53: PlotGroup3D "应力 (磁致伸缩) 5" on selection sel1 | data = dset7
    vol1: Volume "体 1" | expr = solid.misesGp
      def: Deform "变形" | expr = {u, v, w}
  pg54: PlotGroup3D "应力 (磁场力) 5" on selection uni1 | data = dset7
    vol1: Volume "体 1" | expr = solid.misesGp
      def: Deform "变形" | expr = {u, v, w}
    surf1: Surface "表面 1" | expr = mf.normB
      sel1: Selection "选择 1" on selection sel1
  pg55: PlotGroup3D "位移（磁致伸缩） 5" | data = dset7
    surf1: Surface "表面 1" | expr = solid.disp
      sel1: Selection "选择 1" on boundaries 41-83, 106-135, 164-173, 212-241, 270-279, 302-309
      def1: Deform "变形 1" | expr = {u, v, w}
  pg56: PlotGroup3D "位移（磁场力） 5" | data = dset7
    surf1: Surface "表面 1" | expr = solid.disp
      sel1: Selection "选择 1" on boundaries 13-40, 84-105, 136-163, 181-188, 197-210, 242-269, 280-301
      def1: Deform "变形 1" | expr = {u, v, w}
    surf2: Surface "表面 2" | expr = 1
      sel1: Selection "选择 1" on boundaries 41-83, 106-135, 164-173, 212-241, 270-279, 302-309
  pg57: PlotGroup3D "磁通密度 (mf) 6" | data = dset5
    mslc1: Multislice "多切面 1" | expr = mf.normB
    strmsl1: StreamlineMultislice "多切面上的流线 1" | expr = {mf.Bx, mf.By, mf.Bz}
      col1: Color "颜色表达式 1" | expr = mf.normB
      filt1: Filter "过滤器 1" | expr = !isScalingSystemDomain
  pg58: PlotGroup3D "应力 (磁致伸缩) 6" on selection sel1 | data = dset5
    vol1: Volume "体 1" | expr = solid.misesGp
      def: Deform "变形" | expr = {u, v, w}
  pg59: PlotGroup3D "应力 (磁场力) 6" on selection uni1 | data = dset5
    vol1: Volume "体 1" | expr = solid.misesGp
      def: Deform "变形" | expr = {u, v, w}
    surf1: Surface "表面 1" | expr = 1
      sel1: Selection "选择 1" on selection sel1
  pg60: PlotGroup3D "声压 (acpr) 6" | data = dset5
    surf1: Surface "表面 1" | expr = acpr.p_t
  pg61: PlotGroup3D "声压级 (acpr) 6" | data = dset5
    surf1: Surface "表面 1" | expr = acpr.Lp_t
  pg62: PlotGroup3D "声压，等值面 (acpr) 6" | data = dset5
    iso1: Isosurface "等值面 1" | expr = acpr.p_t
  pg63: PlotGroup3D "外场声压级 (acpr) 6" | data = dset5
    rp1: RadiationPattern "辐射方向图 1" | expr = acpr.efc1.Lp_pext
  pg64: PlotGroup2D "外场压力 (acpr) 6"
    rp1: RadiationPattern "辐射方向图 1" | data = dset5; expr = acpr.efc1.pext
  pg65: PolarGroup "外场声压级 xy 平面 (acpr) 6" | data = dset5
    rp1: RadiationPattern "辐射方向图 1" | expr = acpr.efc1.Lp_pext
  pg66: PlotGroup3D "SPL 6" | data = dset5
    mslc1: Multislice "多切面 1" | expr = acpr.Lp_t
    surf1: Surface "表面 1" | expr = 1
      sel1: Selection "选择 1" on boundaries 41-83, 106-135, 164-173, 212-241, 270-279, 302-309
    surf2: Surface "表面 2" | expr = sqrt(mf.Jx^2+mf.Jy^2)
      sel1: Selection "选择 1" on boundaries 13-40, 84-105, 136-163, 181-188, 197-210, 242-269, 280-301
  pg67: PlotGroup3D "位移（磁致伸缩） 6" | data = dset5
    surf1: Surface "表面 1" | expr = solid.disp
      sel1: Selection "选择 1" on boundaries 41-83, 106-135, 164-173, 212-241, 270-279, 302-309
      def1: Deform "变形 1" | expr = {u, v, w}
  pg68: PlotGroup3D "位移（磁场力） 6" | data = dset5
    surf1: Surface "表面 1" | expr = solid.disp
      sel1: Selection "选择 1" on boundaries 13-40, 84-105, 136-163, 181-188, 197-210, 242-269, 280-301
      def1: Deform "变形 1" | expr = {u, v, w}
    surf2: Surface "表面 2" | expr = 1
      sel1: Selection "选择 1" on boundaries 41-83, 106-135, 164-173, 212-241, 270-279, 302-309
  pg69: PlotGroup3D "磁通密度 (mf) 7" | data = dset10
    mslc1: Multislice "多切面 1" | expr = mf.normB
    strmsl1: StreamlineMultislice "多切面上的流线 1" | expr = {mf.Bx, mf.By, mf.Bz}
      col1: Color "颜色表达式 1" | expr = mf.normB
      filt1: Filter "过滤器 1" | expr = !isScalingSystemDomain
  pg70: PlotGroup3D "振型 (solid) 7" | data = dset10
    surf1: Surface "表面 1" | expr = solid.disp
      def: Deform "变形" | expr = {u, v, w}
  pg71: PlotGroup3D "声压 (acpr) 7" | data = dset10
    surf1: Surface "表面 1" | expr = acpr.p_t
    con1: Contour "等值线 1" | expr = acpr.p_t
  pg72: PlotGroup3D "声压级 (acpr) 7" | data = dset10
    surf1: Surface "表面 1" | expr = acpr.Lp_t
  pg73: PlotGroup3D "外场声压级 (acpr) 7" | data = dset10
    rp1: RadiationPattern "辐射方向图 1" | expr = acpr.efc1.Lp_pext
  pg74: PlotGroup2D "外场压力 (acpr) 7"
    rp1: RadiationPattern "辐射方向图 1" | data = dset10; expr = acpr.efc1.pext
  pg75: PolarGroup "外场声压级 xy 平面 (acpr) 7" | data = dset10
    rp1: RadiationPattern "辐射方向图 1" | expr = acpr.efc1.Lp_pext
  pg76: PlotGroup3D "磁通密度 (mf) 8" | data = dset8
    mslc1: Multislice "多切面 1" | expr = mf.normB
    strmsl1: StreamlineMultislice "多切面上的流线 1" | expr = {mf.Bx, mf.By, mf.Bz}
      col1: Color "颜色表达式 1" | expr = mf.normB
      filt1: Filter "过滤器 1" | expr = !isScalingSystemDomain
  pg77: PlotGroup3D "应力 (磁致伸缩) 8" on selection sel1 | data = dset8
    vol1: Volume "体 1" | expr = solid.misesGp
      def: Deform "变形" | expr = {u, v, w}
  pg78: PlotGroup3D "应力 (磁场力) 8" on selection uni1 | data = dset8
    vol1: Volume "体 1" | expr = solid.misesGp
      def: Deform "变形" | expr = {u, v, w}
    surf1: Surface "表面 1" | expr = mf.normB
      sel1: Selection "选择 1" on selection sel1
  pg79: PlotGroup3D "位移（磁致伸缩） 8" | data = dset8
    surf1: Surface "表面 1" | expr = solid.disp
      sel1: Selection "选择 1" on boundaries 41-83, 106-135, 164-173, 212-241, 270-279, 302-309
      def1: Deform "变形 1" | expr = {u, v, w}
  pg80: PlotGroup3D "位移（磁场力） 8" | data = dset8
    surf1: Surface "表面 1" | expr = solid.disp
      sel1: Selection "选择 1" on boundaries 13-40, 84-105, 136-163, 181-188, 197-210, 242-269, 280-301
      def1: Deform "变形 1" | expr = {u, v, w}
    surf2: Surface "表面 2" | expr = 1
      sel1: Selection "选择 1" on boundaries 41-83, 106-135, 164-173, 212-241, 270-279, 302-309
  pg81: PlotGroup1D "探针位移" | data = none
    tblp1: Table "探针表图 1" | table = tbl1; plotcolumns = {2, 3, 4}

Exports
  anim1: Animation "动画 1" | target = player

Methods
  setupFeed_openCircuitTest: CodeEditor
    public class setupFeed_openCircuitTest extends ApplicationMethod {
      public void execute() {
        String tagCoil = "";
        String[] coilPhase = {"", "*exp(-j*2*pi/3)", "*exp(+j*2*pi/3)", "", "*exp(-j*2*pi/3)", "*exp(+j*2*pi/3)"};
        for (int i = 0; i < 6; ++i) {
          tagCoil = "coil"+(i+1);
          with(model.component("comp1").physics("mf").feature(tagCoil));
            set("CoilExcitation", "Voltage");
            set("VCoil", "V1n_f"+coilPhase[i]);
          endwith();
        }
        for (int i = 0; i < 6; ++i) {
          tagCoil = "coil"+(i+7);
          with(model.component("comp1").physics("mf").feature(tagCoil));
            set("CoilExcitation", "Current");
            set("ICoil", "0[A]");
          endwith();
        }
      }
    }
  setupFeed_shortCircuitTest: CodeEditor
    public class setupFeed_shortCircuitTest extends ApplicationMethod {
      public void execute() {
        String tagCoil = "";
        String[] coilPhase = {"", "*exp(-j*2*pi/3)", "*exp(+j*2*pi/3)", "", "*exp(-j*2*pi/3)", "*exp(+j*2*pi/3)"};
        for (int i = 0; i < 6; ++i) {
          tagCoil = "coil"+(i+1);
          with(model.component("comp1").physics("mf").feature(tagCoil));
            set("CoilExcitation", "Current");
            set("ICoil", "I1n_f"+coilPhase[i]);
          endwith();
        }
        for (int i = 0; i < 6; ++i) {
          tagCoil = "coil"+(i+7);
          with(model.component("comp1").physics("mf").feature(tagCoil));
            set("CoilExcitation", "Voltage");
            set("VCoil", "0[V]");
          endwith();
        }
      }
    }
  setupFeed_normalTest: CodeEditor
    public class setupFeed_normalTest extends ApplicationMethod {
      public void execute() {
        String tagCoil = "";
        String[] coilPhase = {"", "*exp(-j*2*pi/3)", "*exp(+j*2*pi/3)", "", "*exp(-j*2*pi/3)", "*exp(+j*2*pi/3)"};
        for (int i = 0; i < 6; ++i) {
          tagCoil = "coil"+(i+1);
          with(model.component("comp1").physics("mf").feature(tagCoil));
            set("CoilExcitation", "Current");
            set("ICoil", "I1n_f"+coilPhase[i]);
          endwith();
        }
        for (int i = 0; i < 6; ++i) {
          tagCoil = "coil"+(i+7);
          with(model.component("comp1").physics("mf").feature(tagCoil));
            set("CoilExcitation", "Voltage");
            set("VCoil", "V2n_f"+coilPhase[i]);
          endwith();
        }
      }
    }
  runStudy: CodeEditor
    public class runStudy extends ApplicationMethod {
      public void execute() {
        if (test.equals("OC")) {
          setupFeed_openCircuitTest();
          model.study("std5").run();
          model.study("std7").run();
          model.study("std8").run();
        }
        if (test.equals("SC")) {
          setupFeed_shortCircuitTest();
          model.study("std6").run();
          model.study("std9").run();
          model.study("std10").run();
        }
        if (test.equals("NO")) {
          setupFeed_normalTest();
          model.study("std1").run();
          model.study("std2").run();
          model.study("std3").run();
        }
      }
    }