// COMSOL Multiphysics 6.3.0.290 model "my_ecore_transformer.zh_CN.mph"
// E 磁芯变压器
// 本例演示如何执行瞬态仿真，模拟一个单相 E 磁芯变压器。通过在软钢磁芯上引入非线性 B-H 曲线效果，可以计算磁场和电场的空间分布、磁饱和效应、瞬态响应以及磁通量泄漏等。其中模拟两种不同版本的变压器：第一种采用单匝数比，第二种采用匝数比 1000。
// Outline of the model tree

Parameters
  Rp = 100[ohm]  // 初级绕组电阻
  Ns = 300  // 次级绕组中的匝数
  nu = 50[Hz]  // 电源电压的频率

Variables
  var1 "变量，算例 1" (disabled)
    Rs = 10[kohm]  // 次级绕组电阻
    Np = 300  // 初级绕组中的匝数
    Vac = 25[V]  // 电源电压
  var2 "变量，算例 2"
    Rs = 100[ohm]  // 次级绕组电阻
    Np = 3e5  // 初级绕组中的匝数
    Vac = 25[kV]  // 电源电压

Probes
  pdom1: DomainPoint "域点探针 1"
    first = {-0.259360871573, -0.979646050057, 35}
    second = {-0.259360871573, -0.979646050057, -35}
    coords = {-0.2593609, -0.9796461, 35}
    ppb1: PointExpr "点探针表达式 1" | expr = solid.u_ttX; unit = m/s^2; descr = 加速度，X 分量; table = tbl3
    ppb2: PointExpr "点探针表达式 2" | expr = solid.u_ttY; unit = m/s^2; descr = 加速度，Y 分量; table = tbl3
    ppb3: PointExpr "点探针表达式 3" | expr = solid.u_ttZ; unit = m/s^2; descr = 加速度，Z 分量; table = tbl3
    ppb4: PointExpr "点探针表达式 4" | expr = u; unit = mm; descr = 位移场，X 分量; table = tbl3
    ppb5: PointExpr "点探针表达式 5" | expr = v; unit = mm; descr = 位移场，Y 分量; table = tbl3
    ppb6: PointExpr "点探针表达式 6" | expr = w; unit = mm; descr = 位移场，Z 分量; table = tbl3

Common definitions
  mpf1: ParticipationFactors "参与因子 1"

Geometry
  geom1 "几何 1" (3D, length unit mm)
    wp1: WorkPlane "工作平面 1" | quickplane = xz; quicky = 10; unite = on
      r1: Rectangle "矩形 1" | size = {80, 70}; base = center
      r2: Rectangle "矩形 2" | size = {60, 50}; base = center
      r3: Rectangle "矩形 3" | size = {20, 50}; base = center
      co1: Compose "组合 1" | input = r1, r2, r3; formula = r1-r2+r3; edge = all
    ext1: Extrude "拉伸 1" | workplane = wp1; input = wp1; distance = 20; contributeto = csel1
    wp2: WorkPlane "工作平面 2" | quickz = -23; unite = on
      c1: Circle "圆 1"
        type = curve
        r = 24
        layername = {层 1, 层 2}
        layer = {4, 4}
        layernameold = {层 1, 层 2}
        iscircularsectorold = on
    ext2: Extrude "拉伸 2" | workplane = wp2; input = wp2; distance = 46
    blk1: Block "长方体 1" | size = {150, 130, 150}; base = center
    fin: Finalize "形成联合体"
    sel1: ExplicitSelection "初级绕组" | selection = fin(1) domains 5, 6, 8, 9; contributeto = csel2.dom
    sel2: ExplicitSelection "次级绕组" | selection = fin(1) domains 3, 4, 7, 10; contributeto = csel2.dom

Materials
  mat1: Common "Copper" on selection geom1_csel2_dom
    def: def "Basic"
      relpermeability = 1
      electricconductivity = 5.998e7[S/m]
      thermalexpansioncoefficient = 17e-6[1/K]
      heatcapacity = 385[J/(kg*K)]
      relpermittivity = 1
      density = 8960[kg/m^3]
      thermalconductivity = 400[W/(m*K)]
    Enu: Enu "Young's modulus and Poisson's ratio"
      E = 110[GPa]
      nu = 0.35
    linzRes: linzRes "Linearized resistivity"
      rho0 = 1.72e-8[ohm*m]
      alpha = 0.0039[1/K]
      Tref = 298[K]
  mat2: Common "Soft Iron (Without Losses)" on selection geom1_csel1_dom
    def: def "Basic"
      electricconductivity = 0[S/m]
      relpermittivity = 1
      density = 7850
    BHCurve: BHCurve
      normB = BH(normHin)
      normH = BH_inv(normBin)
      Wpm = BH_prim(normHin)
      normHin = sqrt(H1^2+H2^2+H3^2+eps)
      DESCR_PREFIX:normHin = 磁场模
      normBin = sqrt(B1^2+B2^2+B3^2+eps)
      DESCR_PREFIX:normBin = 磁通密度模
      BH: Interpolation
        funcnametable = {BH, 1}
        table = 
          {0, 0}
          {663.146, 1}
          {1067.5, 1.1}
          {1705.23, 1.2}
          {2463.11, 1.3}
          {3841.67, 1.4}
          {5425.74, 1.5}
          {7957.75, 1.6}
          {12298.3, 1.7}
          {20462.8, 1.8}
          {32169.6, 1.9}
          {61213.4, 2}
          {111408, 2.1}
          {188487.757, 2.2}
          {267930.364, 2.3}
          {347507.836, 2.4}
        extrap = linear
        fununit = T
        argunit = A/m
        defineinv = on
        defineprimfun = on
    EffectiveBHCurve: EffectiveBHCurve
      normBeff = BHeff(normHeffin)
      normHeff = BHeff_inv(normBeffin)
      Wpmeff = BHeff_prim(normHeffin)
      normHeffin = sqrt(realdot(H1,H1)+realdot(H2,H2)+realdot(H3,H3)+eps)
      DESCR_PREFIX:normHeffin = 有效磁场模
      normBeffin = sqrt(realdot(B1,B1)+realdot(B2,B2)+realdot(B3,B3)+eps)
      DESCR_PREFIX:normBeffin = 有效磁通密度模
      BHeff: Interpolation
        funcnametable = {BHeff, 1}
        table = 
          {0, 0}
          {663.146, 1.00000005169}
          {1067.5, 1.49364951241}
          {1705.23, 1.94153284613}
          {2463.11, 2.25776566937}
          {3841.67, 2.60998064243}
          {5425.74, 2.86644520908}
          {7957.75, 3.14414380972}
          {12298.3, 3.44853805165}
          {20462.8, 3.78167119737}
          {32169.6, 4.05834559011}
          {61213.4, 4.42064655295}
          {111408, 4.72127408955}
          {188487.757, 4.97214814072}
          {267930.364, 5.14551086086}
          {347507.836, 5.24551086143}
        extrap = linear
        fununit = T
        argunit = A/m
        defineinv = on
        defineprimfun = on
    Enu: Enu "杨氏模量和泊松比"
      E = 200[GPa]
      nu = 0.3
    Magnetostrictive: Magnetostrictive "磁致伸缩"
      Ms = 1.6E6
      chi0 = 1000
      lambdas = 10E-6
      lambda100 = 23E-6
      lambda111 = -4.5E-6
    JilesAtherton: JilesAtherton "Jiles-Atherton 模型参数"
      alphaJA = 100

Physics
  solid: SolidMechanics "固体力学" on domains 2-10
    dependent variable u = {u, v, w}
    lemm1: LinearElasticModel "线弹性材料 1" (default)
    free1: Free "自由 1" (default)
    init1: init "初始值 1" (default)
    fix1: Fixed "固定约束 1" on boundaries 8
  mf: InductionCurrents "磁场" on all domains
    dependent variable A = {Ax, Ay, Az}
    ShapeProperty.order_magneticvectorpotential = 1
    fsp1: FreeSpace "自由空间 1" (default)
    mi1: MagneticInsulation "磁绝缘 1" (default)
    init1: init "初始值 1" (default)
    lc1: LaminatedCore "叠片铁芯 1" (disabled) on selection geom1_csel1_dom
      LaminationModel = DirectionBased
      Direction = {0, 1, 0}
      kh_steinmetz = 1000
      alpha = 1
      beta_steinmetz = 1.5
    coil1: Coil "线圈 1" on selection geom1_sel1
      ConductorModel = Multi
      CoilExcitation = CircuitCurrent
      toBeReferencedElectricalCircuitTag = cir
      toBeCreatedElement = none
      N = Np
      AreaFrom = UserDefined
      HarmonicLoss = 0
      materialType = solid
      ccc1: CoilCurrentCalculation "几何分析 1" (default)
        ct1: CoilTerminal "输入 1" on boundaries 35
      loss1: LossCalculation "损耗计算 1" on all domains
    coil2: Coil "线圈 2" on selection geom1_sel2
      ConductorModel = Multi
      CoilExcitation = CircuitCurrent
      toBeReferencedElectricalCircuitTag = cir
      toBeCreatedElement = none
      N = Ns
      AreaFrom = UserDefined
      HarmonicLoss = 0
      materialType = solid
      ccc1: CoilCurrentCalculation "几何分析 1" (default)
        ct1: CoilTerminal "输入 1" on boundaries 31
      loss1: LossCalculation "损耗计算 1" on all domains
    gfa1: GaugeFixingA "A 场规范固定 1" on all domains | equationForm = Stationary
    alnm1: AmperesLawNonlinearMagnetostrictive "安培定律，非线性磁致伸缩 1" on selection geom1_csel1_dom | Hysteresis = 0
    fcal1: ForceCalculation "力计算 1" on selection geom1_csel2_dom
  cir: Circuit "电路"
    dependent variable voltages
    gnd1: GroundNode "接地节点 1" | label = p
    IvsU1: ModelDeviceIV "外部 I vs. U 1"
      V_src = root.comp1.mf.VCoil_1
      Connections = {1, 2}
      label = {p, n}
      hasCurrentPort = 1
    V1: VoltageSource "电压源 1" | Connections = {1, 0}; sourceType = SineSource; value = Vac; freq = nu
    R1: Resistor "电阻 1" | R = Rp; Connections = {0, 2}
    IvsU2: ModelDeviceIV "外部 I vs. U 2" | Connections = {3, 0}
    R2: Resistor "电阻 2" | R = Rs; Connections = {0, 3}

Multiphysics
  npzm1: NonlinearMagnetostriction "非线性磁致伸缩 1" on selection geom1_csel1_dom
    Solid_physics = solid
    MagneticFields_physics = mf
  mmcpl1: Magnetomechanics "磁力学 1" on selection geom1_csel2_dom | Solid_physics = solid; MagneticFields_physics = mf

Mesh
  mesh1 "网格 1"
    size: MeshSizeDefault "大小" | hmax = 15; hmin = 2.7; hcurve = 0.6; hnarrow = 0.5; hgrad = 1.5
    ftet1: FreeTet "自由四面体网格 1" on entire geometry
      size1: Size "大小 1" on domains 2-10 | hmax = 6; custom = on

Studies
  std1 "研究 1"
    ccc: CoilCurrentCalculation "线圈几何分析" | SpecifyCoils = on; CoilName = 1,2; disabledvariables = {var1}
  std2 "研究2，瞬态"
    time: Transient "瞬态"
      tlist = range(0, 1e-4, 0.05)
      disabledvariables = {var1}
      usesol = on
      notsolmethod = sol
      notstudy = std1
  std8 "研究 3，频域"
    ccc: CoilCurrentCalculation "线圈几何分析"
    freq: Frequency "频域" | plist = nu; preusesol = auto; disabledvariables = {var1}; notstudy = std8
    tffft: TimeToFreqFFT "时频 FFT" | fftinputstudy = std2; disabledvariables = {var1}; notstudy = std8
  std7 "研究 4，特征频率"
    eig: Eigenfrequency "特征频率"
      shift = 1[Hz]
      chkeigregion = on
      linpsolnum = auto
      disabledvariables = {var1}
      usesol = on
      notsolmethod = sol
      notstudy = std1
      filtereigdescription = Damped natural frequency

Solver configurations
  sol1 "解 1" (study std1)
    v1: Variables "因变量 1"
    s1: Stationary "稳态求解器 1"
      dDef: Direct "直接"
      se1: Segregated "分离 1"
        ss1: SegregatedStep "分离步骤 1"
        ss2: SegregatedStep "分离步骤 2"
  sol2 "解 2" (study std2)
    v1: Variables "因变量 1" | scalemethod = none
    t1: Time "瞬态求解器 1"
      fc1: FullyCoupled "全耦合 1" | jtech = onevery
      d1: Direct "建议的直接求解器 () (已合并)"
  sol8 "解 8" (study std7)
    v1: Variables "因变量 1"
    e1: Eigenvalue "特征值求解器 1"
      d1: Direct "建议的直接求解器 () (已合并)"
  sol10 "解 10" (study std8)

Datasets
  dset1: Solution | solution = sol1
  dset2: Solution on domains 2-10 | solution = sol2
  dset8: Solution "探针解 8" | solution = sol2
  cpt1: CutPoint3D "域点探针 1" | data = dset8; pointx = -0.2593609; pointy = -0.9796461; pointz = 35
  dset9: Solution | solution = sol8
  dset11: Solution | solution = sol10

Derived values
  pev1: EvalPoint "点探针表达式 1" | data = cpt1; table = tbl3; expr = solid.u_ttX
  pev2: EvalPoint "点探针表达式 2" | data = cpt1; table = tbl3; expr = solid.u_ttY
  pev3: EvalPoint "点探针表达式 3" | data = cpt1; table = tbl3; expr = solid.u_ttZ
  pev4: EvalPoint "点探针表达式 4" | data = cpt1; table = tbl3; expr = u
  pev5: EvalPoint "点探针表达式 5" | data = cpt1; table = tbl3; expr = v
  pev6: EvalPoint "点探针表达式 6" | data = cpt1; table = tbl3; expr = w
  gev1: EvalGlobal "全局计算 1" | data = dset1

Evaluation groups
  std7EvgFrq: EvaluationGroup "特征频率 (研究 5，特征频率)" | data = dset9
    gev1: EvalGlobal "全局计算 1"
      expr = {2*pi*freq, imag(freq)/abs(freq), abs(freq)/imag(freq)/2}
      unit = {rad/s, 1, 1}
      descr = {角频率, 阻尼比, 品质因子}
  std7mpf1: EvaluationGroup "参与因子 (研究 5，特征频率)" | data = dset9
    gev1: EvalGlobal "全局计算 1"
      expr = {mpf1.pfLnormX, mpf1.pfLnormY, mpf1.pfLnormZ, mpf1.pfRnormX, mpf1.pfRnormY, mpf1.pfRnormZ, mpf1.mEffLX, mpf1.mEffLY, mpf1.mEffLZ, mpf1.mEffRX, mpf1.mEffRY, mpf1.mEffRZ}
      unit = {1, 1, 1, 1, 1, 1, kg, kg, kg, kg*m^2, kg*m^2, kg*m^2}
      descr = {参与因子，归一化，X 平移, 参与因子，归一化，Y 平移, 参与因子，归一化，Z 平移, 参与因子，归一化，X 旋转, 参与因子，归一化，Y 旋转, 参与因子，归一化，Z 旋转, 有效模态质量，X 平移, 有效模态质量，Y 平移, 有效模态质量，Z 平移, 有效模态质量，X 旋转, 有效模态质量，Y 旋转, 有效模态质量，Z 旋转}

Tables
  tbl1: Table "表格 1"
    // 体积分 1
    体积损耗密度，电磁 (W) | 体积损耗密度，电磁 (W) | 体积损耗密度，电磁 (W) | 体积损耗密度，电磁 (W)
    1.0502 | 1.84579 | 0 | 0
  tbl2: Table "表格 2"
    // 体积分 2
    freq (Hz) | 体积损耗密度，周期平均 (W)
    0 | 0
    50 | 1.75604
    100 | 0.0479073
    150 | 0.0117476
    200 | 0.0164358
    250 | 0.00371371
    300 | 0.00994383
  tbl3: Table "探针表 3"
    Time (s) | 加速度，X 分量 (m/s^2), 点: (-0.25936, -0.97965, 35) | 加速度，Y 分量 (m/s^2), 点: (-0.25936, -0.97965, 35) | 加速度，Z 分量 (m/s^2), 点: (-0.25936, -0.97965, 35) | 位移大小 (mm), 点: (-0.25936, -0.97965, 35) | 位移场，Y 分量 (mm), 点: (-0.25936, -0.97965, 35) | 位移场，Z 分量 (mm), 点: (-0.25936, -0.97965, 35)
    0 | -5.91902e-13 | 5.00464e-13 | 2.17747e-10 | -4.15403e-33 | -1.28619e-32 | 5.91062e-32
    0.0001 | -5.91902e-13 | 5.00464e-13 | 2.17747e-10 | -3.11191e-18 | 2.66887e-18 | 1.1494e-15
    0.0002 | 4.1197e-12 | 5.94487e-12 | 4.6707e-10 | 2.13384e-17 | 4.92515e-17 | 5.74356e-15
    0.0003 | -3.95867e-12 | -5.51985e-12 | 1.66946e-09 | 2.6616e-17 | 7.0949e-17 | 2.29701e-14
    0.0004 | -3.06317e-13 | 4.65012e-12 | 3.43976e-09 | 2.34606e-17 | 1.15352e-16 | 6.73393e-14
    0.0005 | -5.54181e-11 | 2.1759e-11 | 5.81147e-09 | -3.5196e-16 | 3.12384e-16 | 1.59499e-13
    0.0006 | -1.95249e-12 | 5.05193e-11 | 8.58568e-09 | -8.64485e-16 | 8.97088e-16 | 3.24827e-13
    0.0007 | -1.28692e-11 | 2.04652e-11 | 1.19746e-08 | -1.50851e-15 | 1.74745e-15 | 5.94375e-13
    0.0008 | -4.55857e-11 | 1.77908e-11 | 1.58841e-08 | -2.50027e-15 | 2.80497e-15 | 1.00456e-12
    0.0009 | -6.90884e-11 | 6.85833e-11 | 2.02836e-08 | -4.06853e-15 | 4.38877e-15 | 1.59684e-12
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
Plots
  pg1: PlotGroup3D "磁通密度和电流" | data = dset2
    vol1: Volume "体 1" | expr = mf.normB
      sel1: Selection "选择 1" on domains 2, 4, 6-8, 10
    arwv1: ArrowVolume "体箭头 1"
      expr = {mf.Jx, mf.Jy, mf.Jz}
      descr = 电流密度 （空间坐标系）
      xnumber = 10
      ynumber = 10
      znumber = 5
      sel1: Selection "选择 1" on selection geom1_sel1
    arwv2: ArrowVolume "体箭头 2"
      expr = {mf.Jx, mf.Jy, mf.Jz}
      descr = 电流密度 （空间坐标系）
      xnumber = 10
      ynumber = 10
      znumber = 5
      sel1: Selection "选择 1" on selection geom1_sel2
  pg2: PlotGroup3D "磁芯中的磁通密度" on selection geom1_csel1_dom | data = dset2
    slc1: Slice "切面 1" | expr = mf.normB; quickplane = zx; quickynumber = 1
    arwv1: ArrowVolume "体箭头 1" | expr = {mf.Bx, mf.By, mf.Bz}; xnumber = 10; ynumber = 1; znumber = 10
  pg3: PlotGroup1D "绕组中的感应电压" | data = dset2; xlabel = 时间（秒）; ylabel = 初级绕组中的感应电压 (V); yseclabel = 次级绕组中的感应电压 (V)
    glob1: Global "全局 1" | expr = mf.VCoil_1; unit = V; descr = 初级绕组中的感应电压; legends = VCoil_1
    glob2: Global "全局 2" | expr = mf.VCoil_2; unit = V; descr = 次级绕组中的感应电压; legends = VCoil_2
  pg4: PlotGroup1D "绕组中的电流" | data = dset2; xlabel = 时间（秒）; ylabel = 初级绕组中的电流(A); yseclabel = 次级绕组中的感应电流(A)
    glob1: Global "全局 1" | expr = mf.ICoil_1; unit = A; descr = 初级绕组中的电流; legends = ICoil_1
    glob2: Global "全局 2" | expr = mf.ICoil_2; unit = A; descr = 次级绕组中的电流; legends = ICoil_2
  pg7: PlotGroup1D "探针绘图组 7" | data = none; xlabel = Time (s)
    tblp1: Table "探针表图 1" | table = tbl3; xaxisdata = 1; plotcolumns = {2, 3, 4}
  pg8: PlotGroup1D "探针绘图组 8"
    tblp1: Table "探针表图 1" | table = tbl3; xaxisdata = 1; plotcolumns = {5, 6, 7}
  pg9: PlotGroup3D "位移（洛伦兹力）" | data = dset2
    vol1: Volume "体 1" | data = dset2; expr = solid.disp; descr = 位移大小
      sel1: Selection "选择 1" on selection geom1_csel2_dom
      def1: Deform "变形 1" | expr = {u, v, w}
    surf1: Surface "表面 1" | expr = 1
      sel1: Selection "选择 1" on selection geom1_csel1_bnd
  pg10: PlotGroup3D "位移（磁致伸缩）" | data = dset2
    vol1: Volume "体 1" | data = dset2; expr = solid.disp; descr = 位移大小
      sel1: Selection "选择 1" on selection geom1_csel1_dom
      def1: Deform "变形 1" | expr = {u, v, w}

Exports
  anim1: Animation "动画 1" | giffilename = 位移_磁致伸缩; framesel = all; maxframes = 501
  anim2: Animation "动画 2" | giffilename = 位移_洛伦兹力; framesel = all
  tbl1: Table "表格 1" | table = tbl3; filename = 探针表